g := 9.8
Wmax := 0.2
Wcut := Wmax*3
Kmax := Wmax*Wmax/g = 0.00408163
Sp(w) := 0.0081*g^2*w^-5*exp(-1.25*(Wmax/w)^4)
wf(k) := sqrt(k*g)
kf(w) := w^2/g
Kcut := Wcut*Wcut/g = 0.0367347
E := integral(Sp(w), w = 0 .. ∞) = 97.2405
dk := Kcut/256
E2 := integral(Sp(w), w = 0 .. Wcut) = 95.7514
Spk(k) :=
    0 if k == 0
    Sp(wf(k))*g/(2*wf(k)) otherwise
E/E2 = 1.01555
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