A := 1
B := 1
S(w) := 50*A*w^-5*exp(-1.25*(w/1.5)^-4) + A*w^-5*exp(-1.25*(w/0.5)^-4)
D := 0.01
w := 0.3, 0.31 .. 3
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integral(S(w), w = 0.3 .. 3) = 5.02357
i := 0 .. 270
W[i] := 0.3 + i*D
A[i] := sqrt(S(W[i])*2*D)
Fi[i] := rnd(2*π)
L := 100000
X(t) := sum(A[i]*cos(W[i]*t + Fi[i]), i)
j := 0 .. L
t := 0, 0.1 .. 100
Y[j] := X(0.1*j)
var(Y) = 5.02571
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R := correl(Y, Y)/L
j := 0 .. 500
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Sp(W) := sum(R[j]*cos(W*j*0.1)*0.1, j)*2/π
SpB(W) := sum(R[j]*cos(W*j*0.1)*0.1*(1 - j*0.1/50), j)*2/π
Spb[i] := Sp(W[i])
l := 1 .. 269
Sp1[0] := 0
Sp1[270] := 0
Sp1[l] := Spb[l - 1]*0.23 + Spb[l]*0.54 + 0.23*Spb[l + 1]
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K(w) := w^2/9.81
X(t, x) := sum(A[i]*cos(W[i]*t - K(W[i])*x + Fi[i]), i)
a := 0 .. 100
b := 0 .. 100
T[a] := 0.1*a
x[b] := b
E[a, b] := X(T[a], x[b])  # error: You interrupted calculation. To resume, click here and press 'F9'.
# [component: inputs E]
