g := 9.8
Spm(omega, U) := 0.0081*g^2*omega^-5*exp(-0.74*(omega*U/g)^-4)
D(theta) := cos(theta)^8
Dn := integral(D(x), x = -π/2 .. π/2)
Dn = 0.859029
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SpmD(omega, theta, U) := Spm(omega, U)*D(theta)/Dn
i := 1 .. 100
j := 0 .. 180
SpmD_img[i, j] := SpmD(i/20, j/57.29 - π/2, 10)
max(SpmD_img) = 0.55204
# [component: inputs SpmD_img]
# [component: inputs 255*SpmD_img/max(SpmD_img)]
wmax := 5
Nh := 70
Uwind := 10
Fi[1000] := 0
n := 0 .. 10000 - 1
Fi[n] := rnd(2*π)
Wave1D(L, T, theta, rrr) := sum(SpmD(i*wmax/Nh + (0.04*Fi)[i], theta, Uwind)*cos(i*wmax/Nh*T + (i*wmax/Nh)^2/9.8*L + Fi[i + rrr]), i = 1 .. Nh)
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Wave2D(x, y, T) := sum(Wave1D(x*cos(i*15/57.29) - y*sin(i*15/57.29), T, i*15/57.29, i*i + i*47), i = 1 .. 12)
x := 0 .. 200
y := 0 .. 12
Wave2D_img[y, x] := Wave1D(10*x/1, 0, y*15/57.29 + π/2, y*700)
# [component: inputs 127 + 64*Wave2D_img/max(Wave2D_img)]
