Fi[1000] := 0
n := 0 .. 1000 - 1
Fi[n] := rnd(2*π)
wmax := 4
Asp := 5.00
Bsp := 2.5
Sp(w) := Asp*e^(-Bsp/w^4)/w^5 + 0.1
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Wave(Nh, x, t) := sum(Sp(i/Nh*wmax)*cos(i*wmax/Nh*t + (i*wmax/Nh)^2/9.8*x + Fi[i]), i = 1 .. Nh)
N := 100
P := 2*N*N/wmax^2*9.8*π
Pt := 2*N/wmax*π
P = 38484.5
Pt = 157.08
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F(x) := cos(0.4*x) + cos(0.7*x)
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