Data := READPRN("waving.txt")
i := 0 .. rows(Data) - 1
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Data := READPRN("exp01.txt")  # error: Can't open the data file.
i := 0 .. rows(Data) - 1  # error: This variable is undefined.
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