# Tanker R1 | Submarine R2
Given
Data2 := READPRN("..\rolling2.log")
Data1 := READPRN("..\rolling1.log")
Size2 := rows(Data2)
Size1 := rows(Data1)
N := 5000
dt := 1/30
i := 0 .. Size2 - 1
i := 0 .. Size1 - 1
α(t) := 0
Yaw2 := Data2[:, 0]
X2 := Data2[:, 3]
Ζ2 := Data2[:, 6]
Yaw1 := Data1[:, 0]
X1 := Data1[:, 3]
Ζ1 := Data1[:, 6]
θ''(t) + 2*ν*θ'(t) + η^2*θ(t) == η^2*κ*α(t)
Pitch2 := Data2[:, 1]
Α2 := Data2[:, 7]
Pitch1 := Data1[:, 1]
Α1 := Data1[:, 7]
Y2 := Data2[:, 4]
Y1 := Data1[:, 4]
Roll2 := Data2[:, 2]
Z2 := Data2[:, 5]
Roll1 := Data1[:, 2]
Z1 := Data1[:, 5]
ν := 0.046
θ(0) == 5/57.29
R2(t) := Roll2[t/dt]
η := 0.57
R1(t) := Roll1[t/dt]
θ'(0) == 0
κ := 1
θ := Odesolve(t, N*dt)
Α(t) := Α1[t/dt]
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