Data0 := READPRN("..\cpu0.log")
Size0 := rows(Data0)
i := 0 .. Size0 - 1
cpu00 := Data0[:, 0]
cpu02 := Data0[:, 2]
cpu01 := Data0[:, 1]
cpu03 := Data0[:, 3]
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Data0 := READPRN("..\cpu.log")
Size0 := rows(Data0)
cpu00 := Data0[:, 0]
i := 0 .. Size0 - 1
cpu01 := Data0[:, 1]
cpu02 := Data0[:, 2]
cpu03 := Data0[:, 3]
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