Fi[1000] := 0
n := 0 .. 1000 - 1
Fi[n] := rnd(2*π)
wmax := 5
Asp := 20.00
Bsp := 4
Sp(w) := Asp*e^(-Bsp/w^4)/w^5 + 0*e^(-(0.2*w)^-4)/(0.2*w)^5
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integral(Sp(w), w = 0 .. 10) = 1.2495
A(Nh, w) := sqrt(2*Sp(w)*wmax/Nh)
WaveCos(Nh, t, x, depth) := -depth - sum(e^(-depth/9.81*(wmax*i/Nh)^2)*A(Nh, wmax*i/Nh)*cos(wmax*i*t/Nh + x/9.8*(wmax*i/Nh)^2 + (1*Fi[i])), i = 1 .. Nh)
t := 30
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.
