Fi[1000] := 0
n := 0 .. 1000 - 1
Fi[n] := rnd(2*π)
wmax := 5
exp(x) := e^x
SpU(w, U) := 0.0081*9.81^2*w^-5*exp(-0.74*(w*U/9.81)^-4)
i := 1 .. 50
SpV(w, U) := [w; U; SpU(w, U)]
j := 1 .. 50
SpP[i, j] := SpU(i*0.2, j*0.2)
# [component: inputs SpV]
Sp(w) := SpU(w, 10)  # '
A(Nh, w) := sqrt(2*Sp(w)*wmax/Nh)
WaveCos(Nh, t, x, z) := sum(exp(z*(wmax*i/Nh)^2)*A(Nh, wmax*i/Nh)*cos(wmax*i*t/Nh + x/9.8*(wmax*i/Nh)^2 + (1*Fi[i])), i = 1 .. Nh)
WaveOffset(x, z) := WaveCos(100, 0, x, z)
Wave(x, z) := z + WaveOffset(x, z)
PressS(x, z) :=
    p ← 0 if z ≥ WaveOffset(x, 0)
    p ← WaveOffset(x, z) - z otherwise
    return p
Pressure(x, z) := [x; z; PressS(x, z)]
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W(x) := WaveCos(20, 0, x, 0)
W3D(x, y) := [x; y; W(x - □) + W(x + y) + W(x*2 + y) + W(y*2 + x)]  # error: This placeholder is empty.
# [component: inputs W3D]
