Data := READPRN("rolling.log")
Size := rows(Data)
i := 0 .. Size - 1
Yaw := Data[:, 0]
X := Data[:, 3]
Pitch := Data[:, 1]
Y := Data[:, 4]
Roll := Data[:, 2]
Z := Data[:, 5]
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Roll := Z
n := length(Roll)
n = 1531
n2 := 2^floor(log(n, 2))
n2 = 1024
Roll2 := submatrix(Roll, 0, n2 - 1, 0, 0)
Spect := fft(Roll2)
x := 0 .. 500
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Spect = [
    60.6617; 63.0036 + 8.8448i; 60.2631 + 17.061i; 56.0963 + 24.7049i; 50.7049 + 31.2705i; 44.2553 + 36.4315i; 37.1318 + 39.7827i; 29.5999 + 41.9684i; 22.5169 + 42.4048i; 15.0055 + 41.8183i
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]
