## WAVE ATTRIBUTES
g := 9.8
Spm(omega, U) := 0.0081*g^2*omega^-5*exp(-0.74*(omega*U/g)^-4)
D(theta) := cos(theta)^6
Dn := integral(D(x), x = -π/2 .. π/2)
Dn = 0.981748
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SpmD(omega, theta, U) := Spm(omega, U)*D(theta)/Dn
Uwind := 15
wmax := 5
Nh := 20
Nd := 12
Lperiod := 2*Nh*Nh/wmax^2*g*π
Tperiod := 2*Nh/wmax*π
A(omega, theta) := sqrt(2*SpmD(omega, theta, Uwind))*sqrt(wmax/Nh*π/Nd)
i := 0 .. Nh*3
j := 0 .. Nd*5
Lperiod = 985.203
Fi[i, j] := 4*rnd(1*π)
Tperiod = 25.1327
th[j] := j*π/Nd
w[i] := wmax*i/Nh
k[i] := w[i]^2/g
Wave1D(L, T, j) := sum(A(w[i], th[j])*cos(k[i]*L - w[i]*T + Fi[i, j]), i = 1 .. Nh)
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## WAVE SYNTHESIS
ImgW := 1024
StrideW := Lperiod/ImgW = 0.962113
ImgH := 64
StrideH := Tperiod/ImgH = 0.392699
MinValue := -5
MaxValue := 5
i := 0 .. ImgW - 1
j := 0 .. ImgH - 1
WriteImage(dirband) :=
    for x ∈ 0 .. ImgW - 1
        for y ∈ 0 .. ImgH - 1
            Img[y, x] ← 255*(Wave1D(x*StrideW, y*StrideH, dirband) - MinValue)/(MaxValue - MinValue)
    return Img
WRITERGB("waves/wave00.bmp") := augment(WriteImage(0), WriteImage(1), WriteImage(2))
WRITERGB("waves/wave03.bmp") := augment(WriteImage(3), WriteImage(4), WriteImage(5))
WRITERGB("waves/wave06.bmp") := augment(WriteImage(6), WriteImage(7), WriteImage(8))
WRITERGB("waves/wave09.bmp") := augment(WriteImage(9), WriteImage(10), WriteImage(11))
WRITEPRN("waves/wave.txt") := [Lperiod; Tperiod; MinValue; MaxValue]
