Given
N := 5000
dt := 1/30
ν := 0.1
Data := READPRN("..\silent_water.log")
η := 1.185
Size := rows(Data)
α(t) := 0
κ := 0.7
i := 0 .. Size - 1
θ''(t) + 2*ν*θ'(t) + η^2*θ(t) == η^2*κ*α(t)
Yaw := Data[:, 0]
X := Data[:, 3]
Ζ := Data[:, 6]
Pitch := Data[:, 1]
Α := Data[:, 7]
θ(0) == 5/57.29
Y := Data[:, 4]
Roll := Data[:, 2]
Z := Data[:, 5]
θ'(0) == 0
length(X) = 1456
R(t) := Roll[t/dt]
θ := Odesolve(t, N*dt)
i := 0 .. 6000
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