g := 9.8
U := 15
Sp(w) := 0.0081*g*g*w^-5*exp(-0.74*(w*U/g)^-4)
integral(Sp(w), w = 0 .. ∞) = 1.44247
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Spk(k) := Sp(sqrt(k*g))/(2*sqrt(k*g))*g
integral(Spk(k), k = 0 .. ∞) = 1.44247
N := 512
i := 1 .. N
kmax := 6^2/g = 3.67347
SpFFT[i] := Spk(i*kmax/N)
P[i] := rnd(2*π)
SpFFT[i] := SpFFT[i]*cos(P[i]) + SpFFT[i]*sin(P[i])*1i
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Wave := ifft(SpFFT)
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