ro(u, v, ro0, ro1, ro2) := (ro1 - ro0)*u + (ro2 - ro0)*v + ro0
ro_graph(x, y) := ro(x, y, 1, 2, 3)
dM(v, ro0, ro1, ro2) := integral(ro(u, v, ro0, ro1, ro2), u = 0 .. 1 - v)
M(ro0, ro1, ro2) := integral(dM(v, ro0, ro1, ro2), v = 0 .. 1)
M(ro0, ro1, ro2) → ro0/6 + ro1/6 + ro2/6
M1(n, ro0, ro1, ro2) := sum(sum(ro(i/n, j/n, ro0, ro1, ro2)/(n*n), i = 0 .. n - j), j = 0 .. n)
M2(ro0, ro1, ro2) := limit(M1(n, ro0, ro1, ro2), n → ∞) → ro0/6 + ro1/6 + ro2/6
cu(n, ro0, ro1, ro2) := sum(sum((ro(i/n, j/n, ro0, ro1, ro2)/(n*n)*i/n)/M2(ro0, ro1, ro2), i = 0 .. n - j), j = 0 .. n)
cv(n, ro0, ro1, ro2) := sum(sum((ro(i/n, j/n, ro0, ro1, ro2)/(n*n)*j/n)/M2(ro0, ro1, ro2), i = 0 .. n - j), j = 0 .. n)
limit(cu(n, ro0, ro1, ro2), n → ∞) → (ro0 + 2*ro1 + ro2)/(4*ro0 + 4*ro1 + 4*ro2)
limit(cv(n, ro0, ro1, ro2), n → ∞) → (ro0 + ro1 + 2*ro2)/(4*ro0 + 4*ro1 + 4*ro2)
