g := 9.8
U := 15
wf(k) := sqrt(k*g)
kf(w) := w^2/g
Sp(w) := 0.0081*g^2*w^-5*exp(-0.74*(w*U/g)^-4)
integral(Sp(w), w = 0 .. ∞) = 1.44247
Spk(k) :=
    0 if k == 0
    Sp(wf(k))*g/(2*wf(k)) otherwise
wmin := 0.2
kmin := kf(wmin) = 0.00408163
2*π/wmin = 31.4159
2*π/kmin = 1539.38
N := 512
wmax := wf(kmin*N) = 4.52548
kmax := kf(wmax)
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i := 0 .. N
k[i] := kmin*i
E[i] := kmin*Spk(k[i])
sum(E[i], i) = 1.44201
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amp[i] := sqrt(2*E[i])
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spec[i] := amp[i]*e^(1i*rnd(2*π))
h := ifft(spec)*sqrt(N)
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