Fi[1000] := 0
n := 0 .. 1000 - 1
Fi[n] := rnd(2*π)
wmax := 4
Asp := 5.00
Bsp := 2.5
g := 10
Sp(w) := Asp*e^(-Bsp/w^4)/w^5 + 0
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D(x) := x^2
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WaveD(Nh0, Nh, x, t) := sum(Sp(i/Nh*wmax)*cos(i*wmax/Nh*t + (i*wmax/Nh)^2/g*x + Fi[i]), i = Nh0 .. Nh)
Wave(Nh, x, t) := WaveD(1, Nh, x, t)
N := 50
P := 2*N*N/wmax^2*g*π
Pt := 2*N/wmax*π
P = 9817.48
Pt = 78.5398
sqrt(P) = 99.0832
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