wmin := 0
Asp := 20.00
wmax := 6
Bsp := 1.5
Fi[1000] := 0
n := 0 .. 1000 - 1
Fi[n] := rnd(2*π)
Spc(w) := Asp*e^(-Bsp/w^4)/w^5
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WaveCmplx(N, t) := 1/N*sum(Spc(wmax/N*k)*e^(2*π*1i*(t*wmax/N*k + Fi[k]/π)), k = 1 .. N - 1)
Wave(N, t) := Re(WaveCmplx(N, t))
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N := 1023
Record[N] := 0
dt := 0.01
k := 0 .. N - 1
Record[k] := Wave(100, k*dt)
T := N*dt
Spectrum[k] := 0.1*sum(Record[n]*e^(-2*1i*π*k*n*dt/T), n = 1 .. N)
Auto[k] := □  # error: This placeholder is empty.
Asp[k] := |Spectrum[k]|
AspFFT := fft(Record)
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