f(t) := (sqrt(1 + t*t) + cos(32*t))/(1 + 8*t*t)
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N := 1000
k := 0 .. N
n := 0 .. N
T := 1
x[k] := f(k/N*T + rnd(π/100))
Lowpass(X, k) :=
    r ← 0 if k > 20
    r ← X otherwise
    return r
X[k] := sum(x[n]*e^(-2*π*1i/(N*T)*k*n), n = 0 .. N - 1)
X[k] := Lowpass(X[k], k)
y[n] := sum(X[k]*e^(2*π*1i/(N*T)*k*n), k = 0 .. N - 1)*1/N
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