Fi[1000] := 0
n := 0 .. 1000 - 1
Fi[n] := rnd(2*π)
wmax := 12
Asp := 20.00
Bsp := 1.5
Sp(w) := Asp*e^(-Bsp/w^4)/w^5
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SpC(Nh, k, Fi) := Sp(wmax*k/Nh)*cos(Fi) + Sp(wmax*k/Nh)*sin(Fi)*1i
Wave(Nh, x) := 1/sqrt(2*π)*wmax/Nh*sum(SpC(Nh, k, Fi[k])*e^(1i*x*(wmax*k/Nh)), k = 1 .. Nh)
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N := 1000
k := 0 .. N - 1
dt := 0.1
Record[k] := Re(Wave(500, k*dt))
Auto[k] := 1/(N*dt)*sum(Record[i]*Record[i - k], i = k .. N - 1)
Auto2 := correl(Record, Record)/(N*dt)
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M := 1000
m := 0 .. M - 1
dw := wmax/M
W(m) := wmax/M*m
SpR[m] := sqrt(2*π)/sqrt(2*π)*dt*sum(Record[k]*e^(-1i*k*dt*W(m)), k = 0 .. N - 1)
SpRa[m] := sqrt(2*π)/sqrt(2*π)*dt*sum(Auto[k]*e^(-1i*k*dt*W(m)), k = 0 .. N - 1)
A[k] := rnd(2*π)*sin(k*0.5)
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AB := correl(A, A)/N
