Fi[1000] := 0
n := 0 .. 1000 - 1
Fi[n] := rnd(2*π)
wmax := 6
Asp := 20.00
Bsp := 4
Sp(w) := Asp*e^(-Bsp/w^4)/w^5
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A(Nh, w) := sqrt(2*Sp(w)*wmax/Nh)
WaveCos(Nh, t, x) := sum(A(Nh, wmax*i/Nh)*cos(wmax*i*t/Nh + x/9.8*A(Nh, wmax*i/Nh)^2 + (1*Fi[i])), i = 1 .. Nh)
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Wave(t, x) := WaveCos(50, t, x)  # disabled
a := 0 .. 100
b := 0 .. 100
T[a] := 0.1*a
x[b] := b
E[a, b] := Wave(T[a], x[b])  # disabled
# [component: inputs E]
itw := 0 .. 1800
TestWave[itw] := WaveCos(20, itw/30, 0)
Data := READPRN("..\rolling.log")
Size := rows(Data)
i := 0 .. Size - 1
Yaw := Data[:, 0]
X := Data[:, 3]
Ζ := Data[:, 6]
Pitch := Data[:, 1]
Α := Data[:, 7]
Y := Data[:, 4]
Roll := Data[:, 2]
Z := Data[:, 5]
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x := 0 .. 30
Rwave := correl(Ζ, Ζ)/length(Ζ)
Rship := correl(Z, Z)/length(Z)
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i := 0 .. 300
dt := 1/30
integral(Sp(x), x = 0 .. wmax) = 1.24615
Swave(w) := sum((Rwave[i]*cos(w*i*dt)*(1 - min(1, i/300))*dt)*2/π, i)
Rwave[0] = 1.28574
var(Ζ) = 1.28565
var(TestWave) = 1.23361
var(Z) = 0.513465
Sship(w) := sum((Rship[i]*cos(w*i*dt)*(1 - min(1, i/300))*dt)*2/π, i)
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