Fi[1000] := 0
n := 0 .. 1000 - 1
Fi[n] := rnd(2*π)
wmax := 5
Asp := 5
Bsp := 4
Sp(w) := 0.0081*9.8^2*w^-5*e^(-0.74*(w*25/9.8)^-4)  # disabled
Correlation(Data, WndSize) :=
    R ← correl(Data, Data)/length(Data)
    i ← 0, 1 .. WndSize
    for i ∈ 0 .. WndSize - 1
        R[i] ← R[i]*(0.5 + 0.5*cos(π*i/WndSize))
    for i ∈ WndSize .. length(Data)
        R[i] ← 0
    return Re(R)
Sp(w) := Asp*e^(-Bsp/w^4)/w^5 + 0*e^(-(0.2*w)^-4)/(0.2*w)^5
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integral(Sp(w), w = 0 .. 10) = 0.312375
Spectrum(w, R, N, dt) :=
    a ← 0
    for i ∈ 0 .. N
        a ← a + R[i]*cos(w*i*dt)*dt*2/π
    return Re(a)
A(Nh, w) := sqrt(2*Sp(w)*wmax/Nh)
WaveCos(Nh, t, x) := sum(A(Nh, wmax*i/Nh)*cos(wmax*i*t/Nh + x/9.8*(wmax*i/Nh)^2 + (1*Fi[i])), i = 1 .. Nh)
WaveSlope(Nh, t, x, dx) := atan((WaveCos(Nh, t, x + dx) - WaveCos(Nh, t, x - dx))/(2*dx))
Data := READPRN("..\rolling.log")
dt := 1/30
Size := rows(Data)
i := 0 .. Size - 1
Yaw := Data[:, 0]
X := Data[:, 3]
Ζ := Data[:, 6]
Pitch := Data[:, 1]
Α := Data[:, 7]
RecordTime := dt*Size/60
RecordTime = 31.4461
Y := Data[:, 4]
Roll := Data[:, 2]
Z := Data[:, 5]
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x := 0 .. 30
N := 10000
dt := 1/30
W := 600
i := 0 .. N
RollCorr := Correlation(Roll, W)
WaveCorr := Correlation(Ζ, W)
HeavCorr := Correlation(Z, W)
SlopeCorr := Correlation(Α, W)
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