Given
Data := READPRN("..\sin_wave.log")
N := 5000
dt := 1/30
w := 1.5
a := 0.15
Size := rows(Data)
i := 0 .. Size - 1
a(t) := a*sin(w*t)
Yaw := Data[:, 0]
X := Data[:, 3]
Ζ := Data[:, 6]
ζ''(t) + 2*ν*ζ'(t) + η^2*ζ(t) == -η^2*κ*a(t)
Pitch := Data[:, 1]
Α := Data[:, 7]
Y := Data[:, 4]
Roll := Data[:, 2]
Z := Data[:, 5]
ζ(0) == 0.0
ν := 0.29
η := 2.6
R(t) := Roll[t/dt]
ζ'(0) == 0
mean(Z) = 0.102121
κ := 0.12
mean(Pitch)*57.29 = -0.868172
ζ := Odesolve(t, N*dt)
D := 0.101
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# [component: outputs Kappa]
k := 0 .. 21
vx[k] := k
Kappa1 := Kappa[:, 1]
rows(vx) = 22
KappaS := ksmooth(vx, Kappa1, 3)
rows(Kappa1) = 22
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