Fi[1000] := 0
n := 0 .. 1000 - 1
Fi[n] := rnd(2*π)
wmax := 5
Asp := 1
Bsp := 1
Sp(w) := 0.0081*9.8^2*w^-5*e^(-0.74*(w*25/9.8)^-4)  # disabled
Correlation(Data, WndSize) :=
    R ← correl(Data, Data)/length(Data)
    i ← 0, 1 .. WndSize
    for i ∈ 0 .. WndSize - 1
        R[i] ← R[i]*(0.5 + 0.5*cos(π*i/WndSize))
    for i ∈ WndSize .. length(Data)
        R[i] ← 0
    return R
Sp(w) := Asp*e^(-Bsp/w^4)/w^5
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integral(Sp(w), w = 0 .. 10) = 0.249975
Spectrum(w, R, N, dt) :=
    a ← 0
    for i ∈ 0 .. N
        a ← a + R[i]*cos(w*i*dt)*dt*2/π
    return a
A(Nh, w) := sqrt(2*Sp(w)*wmax/Nh)
WaveCos(Nh, t, x) := sum(A(Nh, wmax*i/Nh)*cos(wmax*i*t/Nh + x/9.8*(wmax*i/Nh)^2 + (1*Fi[i])), i = 1 .. Nh)
WaveSlope(Nh, t, x, dx) := atan((WaveCos(Nh, t, x + dx) - WaveCos(Nh, t, x - dx))/(2*dx))
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N := 5000
dt := 1/30
W := 1000
i := 0 .. N - 1
ZetaData[i] := WaveCos(150, i*dt, 0)
SlopeData[i] := WaveSlope(150, i*dt, 0, 0.01)
ZetaCorr := Correlation(ZetaData, W)
SlopeCorr := Correlation(SlopeData, W)
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.
α(t) := sin(0.3*t)
Given
α(t) := WaveSlope(150, t, 0, 0.001)
θ''(t) + 2*ν*θ'(t) + η^2*θ(t) == η^2*κ*α(t)
ν := 0.1
θ(0) == 0
η := 1.195
θ'(0) == 0
κ := 0.55
θ := Odesolve(t, N*dt)
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RollData[i] := θ(i*dt)
RollCorr := Correlation(RollData, W)
var(RollData) = 0.0146817
var(SlopeData) = 0.0150064
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Ψ(w) := η^4*κ^2/((η^2 - w^2)^2 + 4*ν^2*w^2)
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W := 1500
SpRoll(w) := Spectrum(w, RollCorr, W, dt)
SpA(w) := Spectrum(w, SlopeCorr, W, dt)
Ψp(w) := SpRoll(w)/SpA(w)
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