Fi[1000] := 0
n := 0 .. 1000 - 1
Fi[n] := rnd(2*π)
wmax := 5
Asp := 20.00
Bsp := 5
Sp(w) := Asp*e^(-Bsp/w^4)/w^5 + 0*e^(-(0.2*w)^-4)/(0.2*w)^5
exp(x) := e^x
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Sp(w, U) := 0.0081*9.81^2*w^-5*exp(-0.74*(w*U/9.81)^-4)
i := 1 .. 50
j := 1 .. 50
SpP[i, j] := Sp(i*0.2, j*0.2)
# [component: inputs SpP]
'
