g := 9.8
Data := READPRN("roll.log")
Size := rows(Data)
D := 1500000*g
i := 0 .. Size - 1
B := 10.4
L := 93
λ := 0.6
Roll := Data[:, 0]
TX := Data[:, 1]
T1 := 2*π*sqrt(D/(1000*g*g*B*L*λ)) = 3.22685
TYl := Data[:, 2]
TZ := Data[:, 3]
mch := -(TX[1] - TX[0])/(Roll[1] - Roll[0])*180/(D*π) = 1.63145
T2 := B*0.8/sqrt(mch) = 6.51383
mchPR := (B*0.8/(2*T1))^2 = 1.66199
i := 0 .. 180
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ω := 2*π/T2 = 0.964592
mch - mchPR = -0.0305427
Ship := READPRN("ship.log")
Size := rows(Ship)
Size = 15918
i := 0 .. Size - 1
Yaw := Ship[:, 1]
Time := Ship[:, 0]
Z := Ship[:, 6]
W := Ship[:, 7]
Pitch := Ship[:, 2]
Roll := Ship[:, 3]
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i := Size - 200 .. Size - 1
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