Fi[1000] := 0
n := 0 .. 1000 - 1
Fi[n] := rnd(2*π)
wmax := 12
Asp := 20.00
Bsp := 4
Sp(w) := Asp*e^(-Bsp/w^4)/w^5
Sp(w) := 50*w^-5*exp(-1.25*(w/1.5)^-4) + 1*w^-5*exp(-1.25*(w/0.5)^-4)
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SpC(Nh, k, Fi) := Sp(wmax*k/Nh)*cos(Fi) + Sp(wmax*k/Nh)*sin(Fi)*1i
A(Nh, w) := sqrt(2*Sp(w)*wmax/Nh)
Wave(Nh, x) := 1/sqrt(2*π)*wmax/Nh*sum(SpC(Nh, k, Fi[k])*e^(1i*x*(wmax*k/Nh)), k = 1 .. Nh)
WaveCos(Nh, t) := sum(A(Nh, wmax*i/N)*cos(wmax*i/N + Fi[i]), i = 1 .. Nh - 1)  # error: This value has units: Unitless, but must have units: Force^-1.
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