# Calibration: "Coast guard ship", initial roll = 5 degrees
Given
Data := READPRN("..\cutter_calibration_roll_5_deg.log")
N := 5000
dt := 1/30
Size := rows(Data)
i := 0 .. Size - 1
α(t) := 0.01*sin(t)
Yaw := Data[:, 0]
X := Data[:, 3]
Ζ := Data[:, 6]
θ''(t) + 2*ν*θ'(t) + η^2*θ(t) == η^2*κ*α(t)
Pitch := Data[:, 1]
Α := Data[:, 7]
Y := Data[:, 4]
ν := 2*0.046
Roll := Data[:, 2]
Z := Data[:, 5]
θ(0) == 5/57.29
η := 1.195
R(t) := Roll[t/dt]
θ'(0) == 0
κ := 1
θ := Odesolve(t, N*dt)
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# Reading rolling data
Correlation(Data, WndSize) :=
    R ← correl(Data, Data)/length(Data)
    i ← 0, 1 .. WndSize
    for i ∈ 0 .. WndSize - 1
        R[i] ← R[i]*(0.5 + 0.5*cos(π*i/WndSize))
    for i ∈ WndSize .. length(Data)
        R[i] ← 0
    return Re(R)
Data := READPRN("..\rolling.log")
Size := rows(Data)
i := 0 .. Size - 1
Yaw := Data[:, 0]
X := Data[:, 3]
Ζ := Data[:, 6]
Pitch := Data[:, 1]
Α := Data[:, 7]
Y := Data[:, 4]
Roll := Data[:, 2]
Z := Data[:, 5]
Spectrum(w, R, N, dt) :=
    a ← 0
    for i ∈ 0 .. N
        a ← a + R[i]*cos(w*i*dt)*dt*2/π
    return Re(a)
N := 3000
W := 1000
κ := 0.55
Asp := 1
RollCorr := Correlation(Roll, W)
WaveCorr := Correlation(Α, W)
Ψ(w) := η^4*κ^2/((η^2 - w^2)^2 + 4*ν^2*w^2) + 0.0
Bsp := 1
RollSp(w) := Spectrum(w, RollCorr, W, dt)
ASp(w) := 50*Spectrum(w, WaveCorr, W, dt)
WaveSpR(w) := RollSp(w)*Ψ(w)
Ψp(w) := 50*RollSp(w)/ASp(w)
Sp(w) := Asp*e^(-Bsp/w^4)/w^5 + 0*e^(-(0.2*w)^-4)/(0.2*w)^5
ASpR(w) := 50*RollSp(w)/Ψ(w)
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