# Calibration: "Coast guard ship", initial roll = 5 degrees
Given
Data := READPRN("..\cutter_calibration_roll_5_deg_kappa.log")
N := 5000
dt := 1/30
Size := rows(Data)
i := 0 .. Size - 1
α(t) := 0.5*cos(t)/9.8
Yaw := Data[:, 0]
X := Data[:, 3]
Ζ := Data[:, 6]
θ''(t) + 2*ν*θ'(t) + η^2*θ(t) == η^2*κ*α(t)
Pitch := Data[:, 1]
Α := Data[:, 7]
Y := Data[:, 4]
ν := 2*0.046
Roll := Data[:, 2]
Z := Data[:, 5]
θ(0) == 0/57.29
η := 1.19
R(t) := Roll[t/dt]
θ'(0) == 0
κ := 1
θ := Odesolve(t, N*dt)
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