Given
Data := READPRN("..\sin_wave.log")
N := 5000
dt := 1/30
w := 3.5
a := 0.1
Size := rows(Data)
i := 0 .. Size - 1
α(t) := a*w*w*cos(w*t)/9.8
Yaw := Data[:, 0]
X := Data[:, 3]
Ζ := Data[:, 6]
θ''(t) + 2*ν*θ'(t) + η^2*θ(t) == η^2*κ*α(t)
Pitch := Data[:, 1]
Α := Data[:, 7]
Y := Data[:, 4]
Roll := Data[:, 2]
Z := Data[:, 5]
θ(0) == 0/57.29
ν := 0.11
η := 1.185
R(t) := Roll[t/dt]
θ'(0) == 0
κ := 0.7
θ := Odesolve(t, N*dt)
Θ[i] := θ(i*dt)
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max(Roll) = 0.029043
max(Θ) = 0.0159756
Κ := max(Θ)/max(Roll)
1/Κ = 1.81796
# [component: outputs Kappa]
k := 0 .. 30
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