Data := READPRN("rolling.log")
Size := rows(Data)
i := 0 .. Size - 1
Yaw := Data[:, 0]
X := Data[:, 3]
Pitch := Data[:, 1]
Y := Data[:, 4]
Roll := Data[:, 2]
Z := Data[:, 5]
Roll := Roll
n := length(Roll)
n = 5238
n2 := 2^floor(log(n, 2))
n2 = 4096
Roll2 := submatrix(Roll, 0, n2 - 1, 0, 0)
Spect := fft(Roll2)
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x := 0 .. 30
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